! --------------------------------------------------------------------
! TENSILE TEST FEM MODELLING
! --------------------------------------------------------------------

FINISH
/CLEAR, START, NEW

! >>>>> CONSTANTS <<<<<<
pigreco = acos(-1)
eps = 1.0E-03
Delta = 0.01

! >>>>> GEOMETRY <<<<<
GL = 25                       ! gauge length (mm)
SD = 12.01                    ! specimen diameter (mm)

! >>>>> MATERIAL PROPERTIES <<<<<
EYOUNG = 69279                ! Young's modulus (MPa) eng. σ-ε
ni = 0.33

! >>>>> MESH PARAMETERS <<<<<
NDIVR = 40                     ! n° of elements along the radial direction
NDIVL = 80                     ! n° of elements along the longitudinal direction

! >>>>> LOADING PARAMETERS <<<<<
Umax = 1.7                     ! (mm)
NLST = 50                      ! Loadstep number

! >>>>> GTN MODEL PARAMETERS <<<<<
f0 = 0.0			! initial porosity
q1 = 1.5			! first Tvergaard constant
q2 = 1.0			! second Tvergaard constant
q3 = 2.25			! third Tvergaard constant = q1^2

!i valori di q1,q2 e q3 sono fissati dal modello di Gurson

fN = 0.06			! nucleation porosity
epsN = 0.2			! mean strain
sN = 0.05			! standard deviation of mean strain
sigmaY = 504.337561157479  ! yield stress

gursact = 1			! activate Gurson model

/PREP7
K, 1, 0, 0, 0
K, 2, 0.5*SD-Delta, 0, 0
K, 3, 0.5*SD, 0.5*GL, 0
K, 4, 0, 0.5*GL, 0

x0 = 0.5*SD-Delta
y0 = 0
x1 = 0.5*SD
y1 = 0.5*GL
a1 = ((x0**2+y0**2)-(x1**2+y1**2))/Delta
a2 = -a1*x0-(x0**2+y0**2)
Radius = (a1**2/4-a2)**0.5

CLOCAL, 11, 1, 0.5*SD-Delta+Radius, 0, 0, 0, 0, 0
L, 2, 3 $ CSYS, 0 $ LESIZE, 1, , , NDIVL, 1
L, 3, 4 $ LESIZE, 2, , , NDIVR, 1
L, 4, 1 $ LESIZE, 3, , , NDIVL, 1
L, 1, 2 $ LESIZE, 4, , , NDIVR, 1

A, 1, 2, 3, 4

ET, 1, PLANE183, 0, , 1

MP, EX, 1, EYOUNG
MP, NUXY, 1, ni

! >>>>> Curva σ-ε ingegneristica <<<<<
!TB, MISO, 1, 1, 5

! --------------------------------------------------

! >>>>> Curva σ-ε plastica vera <<<<<
 TB, PLASTIC, 1, 1, 16, MISO
 TBPT, DEFI, 0, 				   504.337561157479
 TBPT, DEFI, 0.000115534083922033, 510.574678957440
 TBPT, DEFI, 0.000174695069810527, 520.832088443861
 TBPT, DEFI, 0.000290514321740064, 529.635680295787
 TBPT, DEFI, 0.000377285111013905, 535.225140078408
 TBPT, DEFI, 0.000601164325520642, 540.795033157382
 TBPT, DEFI, 0.001115097429011100, 545.930489889403
 TBPT, DEFI, 0.002808488881835420, 550.334834870246
 TBPT, DEFI, 0.008202882020689240, 560.515680281468
 TBPT, DEFI, 0.012745301776909600, 570.208002258724
 TBPT, DEFI, 0.019130051953020000, 580.065834907485
 TBPT, DEFI, 0.025785402942148300, 590.044423234889
 TBPT, DEFI, 0.033216485180858000, 600.392514868805
 TBPT, DEFI, 0.042124378606128300, 610.295304091317
 TBPT, DEFI, 0.062610211671425500, 625.942277870904
 TBPT, DEFI, 0.230991789248063000, 687.573153026983
! --------------------------------------------------

! Gurson (gursact different than 0)
*IF, gursact, NE, 0, THEN
  ! GTN base model
  TB, GURSON, 1, , 5, BASE
  TBDATA, 1, sigmaY, f0, q1, q2, q3
  ! GTN Strain-controlled nucleation
  TB, GURSON, 1, , 3, SNNU
  TBDATA, 1, fN, epsN, sN
  ! GTN Coalescence             !la parte sulla coalescenza è tutta commentata
  !TB, GURSON, 1, , 2, COAL
  !TBDATA, 1, fc, fF
*ENDIF

TYPE, 1 $ MAT, 1 $ MSHAPE, 0 $ MSHKEY, 1
AMESH, 1

NLGEOM, ON
FINISH

/SOLU
ANTYPE, STATIC, NEW
RESCONTROL, DEFINE, ALL, LAST
NCNV, 0
OUTRES, ALL, ALL

EQSLV, SPARSE
NROPT, FULL, , ON
NSUBST, 1, 100, 1, ON
AUTOTS, ON
KBC, 0

NSEL, S, LOC, Y, -eps, eps
D, ALL, UY, 0 $ NSEL, ALL

NSEL, S, LOC, X, -eps, eps
D, ALL, UX, 0.0 $ NSEL, ALL

*DO, i, 1, NLST, 1
TIME, i
NSEL, S, LOC, Y, 0.5*GL-eps, 0.5*GL+eps
D, ALL, UY, i*Umax/NLST $ ALLS
SOLVE
*ENDDO

FINISH

/POST1
/OUTPUT, Curva_F-Delta_L, txt
/COM, Forza (kN)  Elongazione (mm)
/OUTPUT

KSEL, S, KP, , 4 $ NSLK, S
*GET, NMRNDKP4, NODE, , NUM, MAX
NSEL, ALL

*DO, i, 1, NLST, 1
	SET, i
	*GET, SPT, NODE, NMRNDKP4, U, Y

	NSEL, S, LOC, Y, -eps, eps $ FSUM
	*GET, FRZ, FSUM, 0, ITEM, FY
	NSEL, ALL

	/OUTPUT, Curva_F-Delta_L, txt, , APPEND
	*VWRITE, FRZ/1000, 2*SPT
(2X,F7.3,8X,F6.3)
/OUTPUT
*ENDDO

FINISH
